<Node name="root" gravity="0 0 0" dt="0.04" >
    <RequiredPlugin pluginName="SofaRHI" />

    <AddDataRepository path="."/>

	<MeshObjLoader name='myLoader' filename='mesh/dragon.obj'/>
    <VisualModel src="@myLoader" />

    <InteractiveCamera />
</Node>
